*Heading
** Job name: Job-1 Model name: Model-1
** Generated by: Abaqus/CAE 2022
*Preprint, echo=NO, model=NO, history=NO, contact=NO
**
** PARTS
**
*Part, name=Part-1
*End Part
**
**
** ASSEMBLY
**
*Assembly, name=Assembly
**
*Instance, name=Part-1-1, part=Part-1
*Node
      1,          40.,           5.,           5.
      2,          40.,           4.,           5.
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*Element, type=C3D8R
   1,   37,   38,   44,   43,    1,    2,    8,    7
   2,   38,   39,   45,   44,    2,    3,    9,    8
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*Nset, nset=_PickedSet2, internal, generate
    1,  1476,     1
*Elset, elset=_PickedSet2, internal, generate
    1,  1000,     1
** Section: Section-1
*Solid Section, elset=_PickedSet2, material=Material-1
,
*End Instance
**
*Nset, nset=_PickedSet4, internal, instance=Part-1-1
  1,  6, 31, 36
*Nset, nset=_PickedSet5, internal, instance=Part-1-1, generate
 1441,  1476,     1
*Elset, elset=_PickedSet5, internal, instance=Part-1-1, generate
  976,  1000,     1
*Nset, nset="_T-Datum csys-1", internal
_PickedSet5,
_PickedSet4,
*Transform, nset="_T-Datum csys-1"
          1.,           0.,           0.,           0.,           1.,           0.
*End Assembly
**
** MATERIALS
**
*Material, name=Material-1
*Density
2700.,
*Elastic
 7e+10, 0.33
** ----------------------------------------------------------------
**
** STEP: Step-1
**
*Step, name=Step-1, nlgeom=NO
*Static
0.01, 1., 1e-05, 0.1
**
** BOUNDARY CONDITIONS
**
** Name: BC-1 Type: Symmetry/Antisymmetry/Encastre
*Boundary
_PickedSet5, ENCASTRE
**
** LOADS
**
** Name: Load-1   Type: Concentrated force
*Cload
_PickedSet4, 2, -10.
**
** OUTPUT REQUESTS
**
*Restart, write, frequency=0
**
** FIELD OUTPUT: F-Output-1
**
*Output, field, variable=PRESELECT
**
** HISTORY OUTPUT: H-Output-1
**
*Output, history, variable=PRESELECT
*End Step
